// SBML level 2 version 1

model PotassiumChannel()

  // Compartments:
  compartment compartmentOne = 1;

  // Species:
  species C1 in compartmentOne = 100;
  species C2 in compartmentOne = 50;
  species C3 in compartmentOne = 100;
  species O in compartmentOne = 50;
  species I in compartmentOne = 100;

  // Reactions:
  reaction_1: C1 => C2; k1*C1;
    k1 = 0.1;
  reaction_2: C2 => C1; k2*C2;
    k2 = 0.1;
  reaction_3: C2 => C3; k3*C3;
    k3 = 0.1;
  reaction_4: C3 => C2; k4*C3;
    k4 = 0.1;
  reaction_5: C3 => O; k5*C3;
    k5 = 0.1;
  reaction_6: O => C3; k6*O;
    k6 = 0.1;
  reaction_7: O => I; k7*O;
    k7 = 0.1;
  reaction_8: I => O; k8*I;
    k8 = 0.1;
  reaction_9: I => C3; k9*I;
    k9 = 0.1;
  reaction_10: C3 => I; k10*C3;
    k10 = 0.1;
end
