// SBML level 2 version 1

model Schlogl()
  // Goldbeter-Koshland Switch

  // Compartments:
  compartment Cell = 1e-15;

  // Species:
  substanceOnly species S in Cell = 110;
  substanceOnly species E1 in Cell = 100;
  substanceOnly species C1 in Cell = 30;
  substanceOnly species P in Cell = 30;
  substanceOnly species E2 in Cell = 100;
  substanceOnly species C2 in Cell = 30;

  // Reactions:
  R1: S + E1 => C1; k1*S*E1;
    k1 = 0.05;
  R2: C1 => S + E1; k2*C1;
    k2 = 0.1;
  R3: C1 => P + E1; k3*C1;
    k3 = 0.1;
  R4: P + E2 => C2; k4*P*E2;
    k4 = 0.01;
  R5: C2 => E2 + P; k4*X*B;
    k5 = 0.1;
  R6: C2 => S + E2; k4*A;
    k6 = 0.1;

  // Unit definitions:
  unit substance = item;
end
